# AguaClara Water Treatment Plants
# Automated Design
# User Inputs:
# Design References
# [reference: UserInputs- 1m deep.xmcd]
# [reference: DesignAssumptions-1m deep.xmcd]
# [reference: MathFunctions.xmcd]
# [reference: PipeDatabase.xmcd]
# [reference: MinorLossCoefficients.xmcd]
# [reference: FluidsFunctions.xmcd]
# Inlet Channel:
# [reference: Inlet Channel.xmcd]
W_InletChannel = 0.36385 m
L_Channel = 2.4336 m
ND_SedPipeEntrance = 12 in
# Sedimentation Tanks:
# [reference: Sedimentation.xmcd]
H_SedBelowSlope = 0.6 m
H_SedBelowStraight = 0 m
H_SedAbove = 0.12 m
H_SedPlate = 0.48 m
HW_Sed = 1.2 m
H_Sed = 1.3 m
Z_Mp = 0.75 m
L_Sed = 3.98353 m
L_SedPlate = 0.554256 m
B_SedPlate = 0.0332751 m
N_SedPlates = 84
AN_SedPlate = 60 deg
V_SedC = 9.90101 m/day
V_SedUp = 64.382 m/day
# Sedimentation Tank Inlet Slopes:
# [reference: Sed. Inlet Slopes.xmcd]
B_SedInlet = 3.53967 cm
AN_SedTopInlet = 48.3629 deg
AN_SedBottom = 10 deg
A_SedInlet = 1349.36 cm^2
A_SedInletMin = 54.1609 cm^2
H_SedTopInlet = 0.6 m
H_SedBottom = 0.0940528 m
# Sedimentation Tank Effluent Launder:
# [reference: Launder.xmcd]
N_SedLaunderOrifices = 62
Q_SedLaunderOrifices = 3.06452 L/min
Z_SedLaunder = 1.14 m
# Exit Channel:
# [reference: Exit Channel.xmcd]
W_ExitChannel = 0.36385 m
ND_SedLaunder = 6 in
H_ExitChannel = 0.55 m
L_SedLaunder = 3.10583 m
L_ExitChannel = 2.4336 m
D_SedLaunderOrifice = 0.354331 in
H_PltWeir = 0.312215 m
HW_ExitChannel = 0.35 m
# Flow Controller:
# [reference: FCM.xmcd]
N_Fcm = 1
ID_FcmTube = 3.175 mm
ID_FcmTube = 0.125 in
L_FcmTube = 99.0625 cm
Q_FcmTubeMax = 285 mL/min
HL_FcmValve = 15.0907 cm
# Flocculator:
# [reference: Flocculation.xmcd]
W_FlocChannel = 0.5334 m
S_FlocBaffle = [0.0669468; 0.0821572; 0.136655; 0.334734] m
B_FlocBaffle = [0.0869468; 0.102157; 0.156655; 0.354734] m
N_FlocBafflesMin = 38
HL_Floc = 8.45648 cm
X_FlocBaffles = [
    0.2286, 3.6338;
    0.315547, 3.27907;
    0.402494, 2.92433;
    0.48944, 2.5696;
    0.576387, 2.21486;
    0.663334, 1.86013;
    0.750281, 1.5054;
    0.837228, 1.15066;
    0.924174, 0.795929;
    1.02633, 0.441195;
    1.12849, 0;
    1.23065, 0;
    1.3328, 0;
    1.43496, 0;
    1.53712, 0;
    1.63927, 0;
    1.74143, 0;
    1.89809, 0;
    2.05474, 0;
    2.2114, 0;
    2.36805, 0;
    2.52471, 0;
    2.68136, 0;
    2.83801, 0;
    2.99467, 0;
    3.3494, 0
] m
HW_FlocStart = 1.28456 m
W_FlocPort = 0.334734 m
L_FlocBaffles = [
    1.13305, 0.865266;
    1.31762, 1.04983;
    1.13305, 0.865266;
    1.31762, 1.04983;
    1.13305, 0.865266;
    1.31762, 1.04983;
    1.13305, 0.865266;
    1.31762, 1.04983;
    1.13305, 0.865266;
    1.30241, 1.04983;
    1.11784, 0;
    1.30241, 0;
    1.11784, 0;
    1.30241, 0;
    1.11784, 0;
    1.30241, 0;
    1.11784, 0;
    1.24791, 0;
    1.06335, 0;
    1.24791, 0;
    1.06335, 0;
    1.24791, 0;
    1.06335, 0;
    1.24791, 0;
    1.06335, 0;
    1.04983, 0
] m
H_FlocPort = 0.5334 m
N_FlocBaffles = 36
Z_FlocBaffles = [
    0, 0;
    0.0669468, 0.334734;
    0, 0;
    0.0669468, 0.334734;
    0, 0;
    0.0669468, 0.334734;
    0, 0;
    0.0669468, 0.334734;
    0, 0;
    0.0821572, 0.334734;
    0, 0;
    0.0821572, 0;
    0, 0;
    0.0821572, 0;
    0, 0;
    0.0821572, 0;
    0, 0;
    0.136655, 0;
    0, 0;
    0.136655, 0;
    0, 0;
    0.136655, 0;
    0, 0;
    0.136655, 0;
    0, 0;
    0.334734, 0
] m
Gt_FlocMinFlow = 4804.38
# Entrance Tank:
# [reference: EntranceTank.xmcd]
ND_Lfom = 6 in
HL_Rm = 4.20427 cm
N_Lfom = 1
D_LfomOrifices = 18 mm
Q_LfomErrorMax = 1.15498 %
N_LfomOrifices = [5; 5; 3; 2; 2; 2; 1; 2; 2; 0]
L_Et = 1.04775 m
W_Et = 1.04775 m
HW_EtMin = 0.2 m
HW_EtMax = 0.4 m
H_Et = 0.5 m
ZW_Et = 1.53456 m
# Sedimentation Tank Sludge Drain:
# [reference: SludgeDrain.xmcd]
N_SedSludgeOrifices = 39
ND_SedSludge = 3 in
Q_SludgeDrainInitial = 339.971 L/min
D_SedSludgeOrifice = 6 mm
# Any additional needed elevations should be calculated in the files above.
# AutoCAD References
# [reference: basics.xmcd]
# [reference: pipe.xmcd]
# [reference: tank.xmcd]
# [reference: lamina.xmcd]
# [reference: cross.xmcd]
# [reference: Tee.xmcd]
# [reference: elbow.xmcd]
# [reference: Sludge.xmcd]
# [reference: Channel.xmcd]
# [reference: Manifold.xmcd]
# [reference: SedTankslopes.xmcd]
# [reference: Sed Tank Inlet Slope.xmcd]
# [reference: chemicalstock.xmcd]
# [reference: SedTank.xmcd]
# [component: inputs SedTank]
# [reference: Flocculation Tank.xmcd]
# [component: inputs FlocTank]
# [reference: Entrance Tank.xmcd]
# [component: inputs EntranceTank]
