# AguaClara Design Tool
Q_Plant := 40*L/s
HL_FlocMax := 40 cm
H_SedSlopesToFlocWeirMin := 25 cm
T_FlocSlab := 15 cm
T_SedWall := 15 cm
T_SedDividingWall := 15 cm
T_SedChannelWall := 15 cm
T_FlocWall := 15 cm
T_FlocDividingWall := 15 cm
T_FiWall := 25 cm
T_FiBoxWall := 15 cm
T_PlantWall := 15 cm
T_PlantFloor := 20 cm
T_ChemSlab := 15 cm
T_DrainChannelWall := 15 cm
C_CoagDoseMax := 40*mg/L
C_ChlorDoseAve := 1*mg/L
method := "EtFlocSedFi"
Mod := 0
## References
# Mathcad to AutoCAD translators:
# [reference: MtoATranslators.xmcd]
# The wrapped MtoA translator contains the functions that the user will want to access. These functions will draw pieces with full functionality - specifying the location, dimension, and orientation of the object. Also, it contains layer control and subtraction capabilities for grouped objects.
# [reference: MtoATranslatorsWrapped.xmcd]
# Plant design calculations:
# [reference: ExpertInputs.xmcd]
# [reference: MathFunctions.xmcd]
# [reference: PipeDatabase abh35.xmcd]
# [reference: MaterialsDatabase.xmcd]
# [reference: FluidsFunctions.xmcd]
# [reference: SedimentationTank.xmcd]
# [reference: LFOM.xmcd]
# [reference: FlocculatorEntranceTank_HighE abh35 2.xmcd]
# [reference: StackedRapidSandFilter.xmcd]
# [reference: ChemicalDoseController.xmcd]
# AutoCAD drawing functions:
# [reference: ChannelF.xmcd]
# [reference: PlumbingF_ST587final.xmcd]
# [reference: TankF.xmcd]
# [reference: StairsF.xmcd]
# [reference: DrainChannelF.xmcd]
# AutoCAD script files:
# [reference: FlocculatorAC HighE abh35.xmcd]
# [reference: SedimentationTankAC.xmcd]
# [reference: EntranceTankInFlocTankAC abh35.xmcd]
# [reference: StackedRapidSandFilterAC EtFloc abh35.xmcd]
# [reference: ChemStockTanksAC EtFloc abh35.xmcd]
# [reference: OperatorAccessAC EtFloc abh35.xmcd]
# [reference: CdcAC_tl428.xmcd]
# Materials list:
# [reference: MaterialsList.xmcd]
# Layouts:
# This file will execute at the very end to create multiple views of the entire plant in paperspace
# [reference: LayoutsAC.xmcd]
# Section Cuts:
# This file will create section cuts in paper space
## All variables displayed must have the standard SI units. They may not have units attached by the user.
# General variables displayed
# Plant summary calculations
HL_PlantTotal := ZW_EtMax - Z_FiExitBottom
Q_Plant = 0.04 m^3/s
HL_PlantTotal = 2.2989 m
H_PlantFreeboard = 0.1 m
# Entrance tank variables displayed
# Tank
H_Et = 2.44147 m
L_Et = 1.60053 m
W_Et = 0.99 m
H_EtApparent = 1.41525 m
# Parameters
V_EtCapture = 0.008 m/s
# Sedimentation plates
L_EtPlate = 0.5 m
N_EtPlates = 16
S_EtPlate = 0.025 m
AN_EtPlate = 0.872665
# Hoppers
N_EtFullHopper =  # error: This variable is undefined.
H_EtHopper =  # error
L_EtHopper =  # error
H_EtHopperBack =  # error
AN_EtSlope = 0.785398
# Rapid mix
ND_RMPipe = 0.3048 m
ED_RapidMix = 1 m^2/s^3
D_RMOrifice = 0.237481 m
# Drain channel
W_EtDC =  # error
L_EtDC =  # error
H_EtDC =  # error
# Drains
ND_EtDrain = 0.1524 m
L_EtDrainStopper = 2.46846 m
# Flow measurement
HL_Lfom = 0.2 m
D_LfomOrifices = 0.04445 m
B_LfomRows = 0.05 m
N_LfomOrifices = [14; 4; 5; 3]
H_LfomOrifices = [0.022225; 0.072225; 0.122225; 0.172225] m
N_LfomRows = 4
# Flow control valve
ND_EtFlowControl =  # error
# Chemical dose controller variables displayed
H_CoagTankAboveHeadTank = 0.3 m
ND_EtFloat = 0.2032 m
HL_Cdc = 0.2 m
# Coagulant
ID_CoagTube = 0.003175 m
C_CoagStock = 159.091 kg/m^3
C_CoagDoseMax = 0.04 kg/m^3
Q_CoagMax = 1.00571e-5 m^3/s
N_CoagTubes = 4
N_CoagTubesActive = 3
L_CoagTube = 0.981625 m
Vol_CoagStock = 1100 L
M_CoagSack = 25 kg
N_CoagSacks = 7
Nu_CoagStock = 1.35062e-6 m^2/s
ND_CoagColumn = 0.01905 m
ID_CoagColumn = 0.0209296 m
Ti_CoagColumnMin = 17.1044 s
H_CoagColumnScale = 0.5 m
D_CoagFloatValveOrifice = 0.0047498 m
HL_CoagFloatValveOrifice = 0.0413844 m
# Chlorine
ID_ChlorTube = 0.003175 m
C_ChlorStock = 8.06386 kg/m^3
C_ChlorDoseMax = 0.002 kg/m^3
Q_ChlorMax = 9.9208e-6 m^3/s
N_ChlorTubes = 4
N_ChlorTubesActive = 3
L_ChlorTube = 1.34767 m
Vol_ChlorStock = 450 L
M_ChlorStock = 3.62874 kg
Nu_ChlorStock = 1e-6 m^2/s
ND_ChlorColumn = 0.75 in
ID_ChlorColumn = 0.0209296 m
Ti_ChlorColumnMin = 17.3394 s
H_ChlorColumnScale = 0.5 m
D_ChlorFloatValveOrifice = 0.0047498 m
HL_ChlorFloatValveOrifice = 0.0402699 m
# Flocculator variables displayed
# Tank
H_Floc = 2.02093 m
L_Floc = 6.69302 m
W_FlocChannel = 0.99 m
N_FlocChannels = 2
HW_FlocEnd = 1.50404 m
T_FlocSlab = 0.15 m
H_FlocPort = 1.08843 m
W_FlocPort = 0.201167 m
# Drains
ND_FlocDrain = 0.1524 m
# Parameters
HL_Floc = 0.416892 m
CP_Floc = 77.7758 m^(2/3)
V_Floc = 0.182685 m/s
ED_FlocAve = 0.0101343 m^2/s^3
ED_FlocMax = 0.0202685 m^2/s^3
Ti_Floc = 493.16 s
Ti_FlocActive = 416.667 s
G_FlocAve = 100.669 1/s
GTheta_Floc = 41945.4
CP_FlocTest =  # error
# Baffles
S_FlocBaffle = 0.221167 m
T_FlocBaffle = 0.002 m
B_FlocBaffle = 0.223167 m
H_FlocBaffleLow = 1.28288 m
H_FlocBaffleHigh = 1.79977 m
N_FlocChannelBaffles = 29
N_FlocFirstChannelBaffles = 21
N_FlocLastChannelBaffles = 28
N_FlocBaffles = 49
# Obstacles
ND_FlocObs = 0.1524 m
H_FlocObs = 0.752021 m
N_FlocSpaceExpansions = 2
N_FlocExpansions = 98
CP_FlocExpansion = 0.793631 m^(2/3)
# Sedimentation tank variables displayed
# General parameters
N_SedTanks = 7
Q_Sed = 0.00571429 m^3/s
V_SedUpBod = 0.001 m/s
# design constraints
V_SedCBod = 0.00012 m/s
V_SedUp = 0.00100476 m/s  # Actual values from this design
Ti_Sed = 1416.37 s
# General dimensions
W_Sed = 1.06 m
L_Sed = 6.69302 m
H_Sed = 1.79849 m
HW_Sed = 1.6922 m
L_SedUpflow = 5.36532 m
W_SedSideSlopes = 0.489233 m
H_SedSideSlopes = 0.583045 m
H_SedFlocWeir = 0.833045 m
H_SedLamellaBottom = 0.981305 m
HW_Sed = 1.6922 m
AN_SedSlope = 0.872665
AN_SedHopperSlopeMin = 0.666405
# Inlet channel
HW_SedInletChannel = 0.370458 m
W_SedInletChannelPreWeir = 0.441157 m
W_SedInletChannelPostWeir = 0.15 m
W_SedInletChannel = 0.641157 m
L_SedChannel = 8.47 m
H_SedInletChannel = 0.470458 m
H_SedWeirInlet = 0.390458 m
HL_SedWeirInlet = 0.0186109 m
H_SedInletChannel = 0.470458 m
# Exit channel
W_SedExitChannelPreWeir = 0.15 m
W_SedExitChannelPostWeir = 0.286538 m
W_SedExitChannel = 0.486538 m
H_SedExitChannel = 0.470458 m
H_SedWeirExit = 0.305558 m
H_SedExitChannel = 0.470458 m
# Exit launder
ND_SedLaunder = 0.1524 m
N_SedLaunderOrifices = 51
D_SedLaunderOrifice = 0.015875 m
L_SedLaunder = 5.34457 m
HL_SedLaunderOrifice = 0.041164 m
B_SedLaunderOrifice = 0.103762 m
# Inlet manifold
ND_SedManifold = 0.2032 m
ND_SedDiffuser = 0.0254 m
L_SedManifoldDiffuser = 0.15 m
N_SedManifoldPorts = 87
ED_SedInlet = 0.133503 m^2/s^3
Q_SedManifoldPort = 6.56814e-5 m^3/s
D_SedManifoldPort = 0.03175 m
B_SedDiffuser = 0.06 m
L_SedManHorizPipe2 = 5.29659 m
W_SedDiffuserInner = 0.003175 m
H_JetReverserToDiffusers = 0.03 m
# Plate settlers
L_SedPlate = 0.5 m
W_SedPlate = 1.06 m
T_SedPlate = 0.002 m
B_SedPlate = 0.027 m  # center to center distance between lamella
S_SedPlate = 0.025 m  # spacing between lamella
N_SedPlates = 165  # Number of plates per sedimentation tank
N_SedPlatesTotal =  # error  # Number of plates for the entire plant
N_SedModules = 15  # Number of modules per bay
N_SedModPlates = 11  # Number of plates per module
AN_SedPlate = 1.0472
# Rapid sand filter variables displayed
# General parameters
Q_Fi = 0.02 m^3/s
N_Fi = 2
V_FiLayer = 0.00183333 m/s
V_FiBw = 0.011 m/s
HL_FiTerminal = 0.455621 m
HL_FiBwInitiation = 1.49222 m
HL_FiBwSS =  # error
# Filter box
H_Fi = 4.67793 m
L_Fi = 1.53826 m
W_Fi = 1.45502 m
T_FiWall = 0.25 m
N_FiLayer = 6
H_FiLayer = 0.2 m
H_FiBottomLayer = 0.26 m
H_FiSand = 1.30528 m
# Auxiliary boxes
L_FiEntrance = 1.08423 m
W_FiEntrance = 1.02753 m
H_FiEntrance = 1.19101 m
L_FiExit = 0.5183 m
W_FiOverflow = 0.377493 m
L_FiOverflow = 0.984233 m
W_FiInletChannel = 0.398456 m
L_FiInletChannel = 2.73255 m
H_FiInletChannel = 0.547172 m
# Pipe diameters
ND_FiTrunk = 0.1524 m
ND_FiBwTrunk = 0.254 m
ND_FiSandOutlet = 0.0508 m
ND_FiSiphonAirValve = 0.01905 m
ND_FiSiphon = 0.2032 m
ND_FiTrunkFlushValve = 0.0381 m
ND_FiBwTrunkFlushValve = 0.0762 m
ND_FiExitWaste = 0.1016 m
ND_FiEntOverflow = 0.1524 m
ND_FiInletChannelDrain = 0.0508 m
ND_FiManBranch = 0.0254 m
ND_FiBwManBranch = 0.0381 m
ND_FiBypass = 0.2032 m
# Siphon manifold
B_FiSiphonManOrifices = 0.0650861 m
N_FiSiphonManOrifices = 20
D_FiSiphonManOrifices = 0.0508 m
# Manifold assembly
B_FiManifoldBranch = 0.1 m
N_FiManBranch = 30
# Slotted pipe design
N_FiSlotRows = 2
B_FiManSlot = 0.003175 m
B_FiBwManSlot = 0.0047625 m
# Materials list variables displayed
L_SedLaunder = 5.34457 m
N_ValveCouplings =  # error
N_SedPlatesTotal =  # error
N_SedPlatesPerSheet =  # error
N_SedPlateSheets =  # error
N_Valves =  # error
A_EtFloor =  # error
W_FlocWithWalls =  # error
L_FlocWithWalls =  # error
Vol_FlocFloor = 2548.96 L
A_FlocFloor = 16.993 m^2
A_SedFloor = 60.2798 m^2
## Display AC variables
AC_EntranceTank = [
    "-layer m EtCon";
    "c t 132,132,132";
    "EtCon";
    "  ";
    "_-view o t _zoom w -5.62063,9.45,0.15 -6.85302,10.76,2.59147";
    "_box -5.78063,9.61,0.15 -6.69302,10.6,2.59147 _box -5.63063,9.46,0 -6.84302,10.75,2.59147";
    "_subtract -5.63063,9.46,0  -5.78063,9.61,0.15 ";
    "_-view o t _zoom w -4.93249,9.45,2.01431 -5.79063,10.76,2.59147";
    "_box -5.09249,9.61,2.01431 -5.63063,10.6,2.59147 _box -4.94249,9.46,1.86431 -5.78063,10.75,2.59147";
    "_subtract -4.94249,9.46,1.86431  -5.09249,9.61,2.01431 "
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]
AC_FlocTank =  # no stored result
AC_OperatorAccess = [
    "-layer m OpWalkwayCon"; "c t 132,132,132"; "OpWalkwayCon"; "  "; "_box 0,0,1.08358 -13.23227,12.25,1.28358"; "-group c OpWalkwayCon y "; "all "; "-layer s 0"; "  "; "-layer f OpWalkwayCon"
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]
AC_SedTank =  # no stored result
AC_ChemTanks = [
    "-layer m OpChemPlatformCon"; "c t 132,132,132"; "OpChemPlatformCon"; "  "; "_box -7.99302,12.25,2.90417 -13.23227,5.91005,2.75417"; "_-view o f"; "_pline"; "-12.03227,2.90417"; "-12.03227,2.67266"; "-11.83227,2.67266"
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]
AC_Filter =  # no stored result
AC_Cdc =  # error
AI_EtFlocSedFi = [
    "laythw"; "_-view o t"; "-plot y "; "PublishToWeb PNG.pc3"; "User 1 (824.00 x 583.00 Pixels)"; "l n e F"; ""; " ."; "y  [FILEPATH]EtFlocSedFi_t"; "n y"
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]
AI_EtFlocSedFiEt = [
    "-group c * y "; "all "; "-layer s 0"; "  "; "-layer f *"; "  "; "-layer t Et*"; "  "; "-layer s Et*"; "  "
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]
AI_EtFlocSedFiFloc = [
    "-group c * y "; "all "; "-layer s 0"; "  "; "-layer f *"; "  "; "-layer t Floc*"; "  "; "-layer s Floc*"; "  "
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]
AI_EtFlocSedFiSed = [
    "-group c * y "; "all "; "-layer s 0"; "  "; "-layer f *"; "  "; "-layer t Sed*"; "  "; "-layer s Sed*"; "  "
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]
AI_EtFlocSedFiFilter = [
    "-group c * y "; "all "; "-layer s 0"; "  "; "-layer f *"; "  "; "-layer t Fi*"; "  "; "-layer s Fi*"; "  "
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]
AI_EtFlocSedFiOp = [
    "-group c * y "; "all "; "-layer s 0"; "  "; "-layer f *"; "  "; "-layer t Op*"; "  "; "-layer s Op*"; "  "
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]
AI_Final = ["shademode x -view swiso"; "laythw"]
