# AguaClara Design Tool
Country = 1
Q_Plant = 0.018
Language = 0
Country := 0
# Design References
# MathCAD dimension calculations:
# [reference: BasicClientInputs.xmcd]
# [reference: ExpertInputs.xmcd]
# [reference: DesignAssumptions.xmcd]
# [reference: MathFunctions.xmcd]
# [reference: PipeDatabase.xmcd]
# [reference: MinorLossCoefficients.xmcd]
# [reference: FluidsFunctions.xmcd]
# [reference: Sedimentation Tank.xmcd]
# [reference: Flocculator.xmcd]
# [reference: Rapid Mix.xmcd]
# [reference: LFOM.xmcd]
# [reference: EntranceTankDim.xmcd]
# [reference: LinearCdc_app37.xmcd]
# [reference: ChemStorageCylinders.xmcd]
# [reference: Materials List.xmcd]
# AutoCAD drawing programs:
# Translators:
# These are the codes that take MathCAD outputs and create AutoCAD scripts that are used to draw the plant (formerly Basics)
# [reference: MtoATranslators.xmcd]
# The wrapped MtoA translator contains the functions that the user will want to access. These functions will draw pieces with full functionality - specifying the location, dimension, and orientation of the object. Also, it contains layer control and subtraction capabilities for grouped objects.
# [reference: MtoATranslators Wrapped.xmcd]
# Plant Elements:
# These are all of the files that draw the fundamental parts of the plants (tees, elbows, tanks, pipes, etc)
# [reference: Channel.xmcd]
# [reference: cross.xmcd]
# [reference: Sludge.xmcd]
# [reference: Manifold.xmcd]
# [reference: pipe.xmcd]
# [reference: elbow.xmcd]
# [reference: Tee.xmcd]
# [reference: tank.xmcd]
# [reference: lamina.xmcd]
# [reference: adapter.xmcd]
# [reference: Tee2.xmcd]
# [reference: pvccap.xmcd]
# [reference: LaunderCap.xmcd]
# [reference: ChimneyStops.xmcd]
# [reference: laminaplain.xmcd]
# [reference: Stairs.xmcd]
# [reference: DrainChannel.xmcd]
# [reference: Manifold.xmcd]
# Specific Pieces:
# These are the codes that draw the bigger pieces of the plant (the sed tank, floc tank, etc)
# [reference: floctank.xmcd]
# [reference: chlorinestock.xmcd]
# [reference: SedTank- with pieces.xmcd]
# [reference: Entrance Tank.xmcd]
# [reference: AlumstockCylinder.xmcd]
# [reference: Plant Drain Channel.xmcd]
# [reference: Operator Access.xmcd]
# Layouts:
# This file will execute at the very end to create multiple views of the entire plant in paperspace
# [reference: Layouts.xmcd]
# Entrance Tank:
L_Et = 4.12027 m  # length of the entrance tank
L_EtHopper = 1.33982 m  # length of the entrance tank hopper
H_EtHopper = 0.962359 m  # height of the entrance tank hopper
H_EtTop = 0.537641 m  # height of the top part of the entrance tank above the hoppers
H_Et = 1.6 m  # height of the entrance tank
Z_Et = 0.630685 m  # elevation of the entrance tank
ND_RMPipe = 0.2032 m  # nominal diameter of the rapid mix pipe
ND_EtOverflow = 0.3048 m  # nominal diameter of the overflow weir
# Sed Tanks and Slopes:
N_SedTanks = 3
H_SedBetween = 0 cm  # Distance from the top of the inlet manifold to the bottom of the ledge supporting the lamella frame
L_Sed = 3.88612 m
N_SedBays = 2  # Number of bays of inlet manifolds in each sed tank
# Length of the port through which water exits the inlet manifold
# Width of ferrous cement plates in whice one manifold port is cut
Q_SedBay = 3 L/s
# Sedimentation Tank Sludge Drain:
N_SedSludgeOrifices = 38  # per cell
Ti_SludgeDrain = 30 min  # Tank Drain time
W_SedSludge = 9.92945 cm  # Width of the sludge channel
B_SedSludgeOrifices = 10 cm  # Distance center to center between drain orifices
H_SedSludge = 4.96473 cm  # Depth of the sludge channel
T_SedSludge = 5 cm
T_SedSludge = 5 cm
# Thickness of the plate topping the sludge channel
# through which drain holes are formed
W_SedDrainCover = 19.9295 cm
D_SedSludgeOrifice = 0.0111125 m  # Diameter of drain orifices
W_SedInletBottom = 0.400353 m
N_SedSludgeOrifices = 38
ND_SedSludgeValve = 2 in
# Sedimentation Tank Dimensions:
Z_SedSludge = 0.0996473 m  # Height from 0 of the top of the sludge drain
Z_SedSlopes = 0.749777 m  # Height from 0 of the top of the inlet manifold
W_Sed = 2 m  # Total tank wall height
L_Sed = 3.88612 m  # Total tank length
# Inlet Channel:
HW_InletChannel = 0.304463 m  # Width of the drop chimneys connecting channel to sed inlet manifolds
W_InletChannel = 0.472582 m  # length of drop chimmneys
L_Channel = 6.6 m
N_SedInletPipes = 2  # per sed bay
H_InletChannel = 0.404463 m
# Sedimentation Tank Effluent Launder:
N_SedLaunderOrifices = 46  # Number of orifices per launder
Q_SedLaunderOrifices = 6.77868e-5 m^3/s  # More Launder Dimensions
ND_SedLaunder = 4 in
B_SedLaunderOrifices = 0.108646 m  # Center to center launder spacing
L_SedLaunder = 2.6705 m
# Exit Channel:
D_SedLaunderOrifice = 0.5 in
W_ExitChannel = 0.385098 m
H_ExitChannel = 0.404463 m
L_ExitChannel = 6.6 m
H_PltWeir = 0.314463 m  # height of the weir carrying water to the distribution tank
HW_ExitChannel = 0.264463 m  # water height in exit channel from 0
# Lamella:
L_SedPlate = 0.6 m
B_SedPlate = 2.79102 cm  # center to center distance between lamella
S_SedPlate = 2.59102 cm  # spacing between lamella
N_SedPlates = 80  # Number of Sed Plates per Sedimentation Tank Bay.
AN_SedPlate = 1.0472
V_SedC = 9.82061 m/day
L_SedActive = 2.57824 m
T
V_SedUp = 66.6989 m/day
Z_SedLaunder = 1.4648 m
H_SedPlate = 0.519615 m
H_SedAbove = 0.151084 m  # Height of water needed above the lamella
N_SedPlates = 80
HW_Sed = 1.55874 m
H_Sed = 1.65874 m
Z_Mp = 1.25427 m
H_SedBayDivider = 0.749777 m
# Flocculator:
W_FlocChannel = 0.54 m
ED_Floc = 0.006 m^2/s^3
HW_FlocEnd = 1.55874 m
N_FlocChannels = 6
L_FlocTank = 23.3167 m
HL_Floc = 18.6115 cm
HW_FlocStart = 1.74485 m
S_FlocBaffle = [23.8508; 23.8508; 23.8508; 23.8508; 23.8508; 25.1935] cm
B_FlocBaffle = [24.0508; 24.0508; 24.0508; 24.0508; 24.0508; 25.3935] cm
N_FlocChannelBaffles = [15; 15; 15; 15; 15; 14]
W_FlocPort = [0.238508; 0.238508; 0.238508; 0.238508; 0.238508; 0.257208] m
HL_FlocChannels = [3.18678; 3.18678; 3.18678; 3.18678; 3.18678; 2.67764] cm
L_FlocBaffleLower = 1.20098 m
L_FlocBaffleUpper = 1.43709 m
H_FlocPort = [0.54; 0.54; 0.54; 0.54; 0.54; 0.528929] m
Ti_Floc = 18.1723 min  # residence time of the flocculator
N_FlocBaffles = 89
# Materials List:
N_Launders = 6
L_LaunderPipeTotal = 16.023 m
N_Valves = 6
N_LaunderCouplings = 6
N_ValveCouplings = 6
N_SedPlatesTotal = 480
N_SedPlatesPerSheet = 5
N_SedPlateSheets = 96
AC_ChemTanks = [
    "-layer m CoagTanks"; "c t 132,132,132"; "CoagTanks"; "  "; "_-view o t"; "_cylinder -4.72427,13.05519,2.83068 0.259 1.2242"; "_cylinder -4.72427,13.05519,2.83568 0.254 1.2192"; "_-view o t"; "_subtract -4.98327,13.05519,2.83068  -4.97827,13.05519,2.83068 "; "-group c CoagTanks y "
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]
AC_EntranceTank =  # no stored result
AC_DrainChannel = [
    "-layer m DrainChannel"; "c t 214,214,214"; "DrainChannel"; "  "; "3dpoly"; "0.3,-0.5183,-0.2024"; "0.3,-0.5183,-0.28642"; "0.3,-0.1183,-0.52044"; "0.3,0.2817,-0.28642"; "0.3,0.2817,-0.2024"
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]
AC_Filter =  # error: This variable is undefined.
AC_SedTank =  # no stored result
AC_FlocTank = [
    "-layer m FlocTank";
    "c t 132,132,132";
    "FlocTank";
    "  ";
    "_-view o t _zoom w 0.16,6.29,0 -4.04612,10.6,1.84485 _box 0,6.45,0 -3.88612,10.44,1.84485 _box 0.15,6.3,-0.15 -4.03612,10.59,1.84485 _subtract 0.15,6.3,-0.15  0,6.45,0 ";
    "_box -4.03612,6.99,0 0.15,7.14,1.84485";
    "_box -4.03612,7.68,0 0.15,7.83,1.84485";
    "_box -4.03612,8.37,0 0.15,8.52,1.84485";
    "_box -4.03612,9.06,0 0.15,9.21,1.84485";
    "_box -4.03612,9.75,0 0.15,9.9,1.84485"
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]
AC_OperatorAccess = [
    "-layer m Walkway";
    "c t 132,132,132";
    "Walkway";
    "  ";
    "_box 0.15,0,1.15874 1.65,10.59,1.45874";
    "-group c Walkway y ";
    "all ";
    "-layer s 0";
    "  ";
    "-layer f Walkway";
    "  ";
    "_box 0.15,1.45174,1.15874 0.29478,1.54826,1.45874";
    "_box 0.15,0.45174,1.15874 0.29478,0.54826,1.45874";
    "-array all  R 3 1 2.15";
    "_box 0.15,6.65967,1.15874 0.33098,6.78033,1.45874";
    "_box 0.15,8.03967,1.15874 0.33098,8.16032,1.45874";
    "_box 0.15,9.41967,1.15874 0.33098,9.54032,1.45874";
    "_box 0.15,10.10967,1.15874 0.33098,10.23032,1.45874";
    "-group c DeleteMe y ";
    "all ";
    "-layer t Walkway";
    "  ";
    "_subtract";
    "g Walkway";
    " g DeleteMe ";
    "-layer f Walkway";
    "  "
]
AC_Layout =  # no stored result
