# AguaClara Design Tool
Country =  # error: This variable is undefined.
Language =  # error
C_ChlorineDoseMax := 2*mg/L
C_ChlorineStock := 50*gm/L
Ti_ChlorineStock := 30 hr
Country := 0  # Needs to be redefined as zero until we create a database for all countries.
## References
# MathCAD dimension calculations:
# [reference: BasicClientInputs.xmcd]
# [reference: ExpertInputs.xmcd]
# [reference: MathFunctions.xmcd]
# [reference: PipeDatabase.xmcd]
# [reference: FluidsFunctions.xmcd]
# [reference: SedimentationTank.xmcd]
# [reference: flocculator may.xmcd]
# [reference: LFOM.xmcd]
# [reference: LinearCdc.xmcd]
# [reference: ChemStorageTanks.xmcd]
# [reference: EntranceTankabh35.xmcd]
# [reference: StackedRapidSandFilterabh35.xmcd]
# [reference: DrainChannel.xmcd]
# [reference: MaterialsList.xmcd]
# AutoCAD drawing programs:
# Translators:
# These are the codes that take MathCAD outputs and create AutoCAD scripts that are used to draw the plant (formerly Basics)
# [reference: MtoATranslators.xmcd]
# The wrapped MtoA translator contains the functions that the user will want to access. These functions will draw pieces with full functionality - specifying the location, dimension, and orientation of the object. Also, it contains layer control and subtraction capabilities for grouped objects.
# [reference: MtoATranslatorsWrapped.xmcd]
# Drawing functions:
# [reference: ChannelF.xmcd]
# [reference: PlumbingF.xmcd]
# [reference: TankF.xmcd]
# [reference: StairsF.xmcd]
# [reference: DrainChannelF.xmcd]
# AutoCAD Script Files:
# [reference: FlocculatorAC.xmcd]
# [reference: SedimentationTankAC.xmcd]
# [reference: EntranceTankACabh35.xmcd]
# [reference: ChemStockTanksAC.xmcd]
# [reference: StackedRapidSandFilterACabh35.xmcd]
# [reference: DrainChannelAC.xmcd]
# [reference: CdcAC.xmcd]
# [reference: OperatorAccessAC.xmcd]
# [reference: MaterialsAC.xmcd]
# Layouts:
# This rearranges the plant to optimize the layout
# [reference: PlantLayoutsAC.xmcd]
# This file will execute at the very end to create multiple views of the entire plant in paperspace
# [reference: LayoutsAC.xmcd]
## All variables displayed must have the standard SI units. They may not have units attached by the user.
# General
Q_Plant = 0.032 m^3/s
Pi_VenaContractaOrifice = 0.63
T_PlantWall = 0.15 m
W_SedPlate = 1.0668 m
T_ConcreteMin = 0.05 m
L_SedPlateSheet = 3 m
C_CoagStock = 240 kg/m^3
T_SedPlate = 0.002 m
Ti_CoagStock = 108000 s
T_SedWeir = 0.04 m
C_ChlorineStock = 50 kg/m^3
W_SedBay = 1.0668 m
Ti_ChlorineStock = 108000 s
HL_ChannelMax = 0.05 m  # Eliminate FCM variable from design specs
H_PlantFreeboard = 0.1 m
EN_DrillSeries = 0
# Entrance Tank
V_EtUp = 0.008 m/s
W_EtCapture =  # error
H_EtOverflowChannel =  # error
H_Et =  # error
H_EtTop = 0.3 m  # height of the top part of the entrance tank above the hoppers
W_Et =  # error
L_Et =  # error
ND_EtDrain = 0.0762 m
HL_Lfom = 0.2 m
ZW_Et =  # error
Z_EtTop =  # error
Z_Et =  # error  # elevation of top of slab.
ND_RMPipe = 0.3048 m
Z_EtHopper =  # error
H_EtHopper =  # error
N_EtHoppers =  # error
ND_EtFlowControl =  # error
L_EtHopper =  # error
AN_EtSlope = 0.785398
W_EtDC =  # error  # drain channel under entrance tank dimensions
L_EtDC =  # error
H_EtDC =  # error  # Give heights of the channel at the beginning and end and change the design specs to explain that it's sloped.
# Flow measurement
D_LfomOrifices = 0.01905 m
S_LfomRows = 0.02 m
H_LfomOrifice = [0.009525; 0.029525; 0.049525; 0.069525; 0.089525; 0.109525; 0.129525; 0.149525; 0.169525; 0.189525] m
Q_LfomScale = [0; 0.0032; 0.0064; 0.0096; 0.0128; 0.016; 0.0192; 0.0224; 0.0256; 0.0288; 0.032] m^3/s
N_LfomOrifices =  # error
ND_Lfom = 0.3048 m
HL_Lfom = 0.2 m
# Rapid Mix
ED_Tee =  # error
Z_LfomOrifices =  # error  # elevation of the center of
Z_EtExit =  # error  # elevation of center of pipe exiting the entrance tank and heading toward the flocculator
W_DC =  # error
# Maybe give the vertical distances below the bottom of the sed tank of the beginning and end of the channel? Calculate them, display, and add to the design specs.
H_DC =  # error
L_DC =  # error
# Plant Drain Channel
Z_CoagTank =  # error
Z_CoagTankOutlet =  # error
L_CdcFloatArm = 0.41275 m
Q_CdcMax = 6.4e-6 m^3/s
L_CdcScaleArm = 0.50165 m
C_CoagDoseMax = 0.06 kg/m^3
B_StockOutlet = 0.1 m
L_CoagCdcTube = 1.29663 m
D_CdcTube = 0.003175 m
N_CoagCdcTubes = 4
HL_Cdc = 0.2 m
L_CdcFloatArm = 0.41275 m
L_CdcScaleArm = 0.50165 m
# Coag Dose Controller
# Flocculator
H_Floc = 2.2676 m
Z_FlocTank = 0 m  # Look at Flocculator Positioning arrays
N_FlocValves = 2
W_FlocChannel = 0.54 m
Ti_Floc = 784.453 s  # Fill last channel with bafffles from last channel
H_FlocSlope = 0.04445 m  # Fix port width to be based on energy dissipation in that channel
ED_Floc = 0.01 m^2/s^3
# Adjust spacing after the number of baffles per channel is known.
V_Floc = 0.192903 m/s  # Check the residence time of the flocculator should be at least 20minutes
HW_FlocEnd = 1.86783 m
ND_FlocValve = 0.0762 m
CP_Floc = 75 m^(2/3)
Ti_FlocDrain = 1800 s
CP_FlocTotal = 111.74 m^(2/3)
N_FlocChannels = 4
G_Floc = 61.2167 1/s
L_FlocTank = 24.8877 m
HL_Floc = 0.299769 m
ED_FlocChannelFirst = 0.00949339 m^2/s^3
HW_FlocStart = 2.1676 m
S_FlocBaffle = [0.307196; 0.307196; 0.307196; 0.307196] m
B_FlocBaffle = [0.309196; 0.309196; 0.309196; 0.309196] m
N_FlocChannelBaffles = [19; 19; 19; 18]
W_FlocPort = [0.307196; 0.307196; 0.307196; 0.307196] m
S_FlocBaffleFirst = 0.307196 m
HL_FlocChannels = [0.0758908; 0.0758908; 0.0758908; 0.0720963] m
L_FlocBaffleLower = 1.40704 m
L_FlocBaffleUpper = 1.75681 m
H_FlocPort = [0.54; 0.54; 0.54; 0.54] m
Ti_Floc = 784.453 s  # residence time of the flocculator
N_FlocBaffles = 75
ND_FlocValve = 3 in
EN_FlocBaffle = 1
# Sed Tanks
N_SedTanks = 3
L_Sed = 6.22193 m
N_SedBays = 2  # Number of bays of inlet manifolds in each sed tank
Q_SedBay = 0.00533333 m^3/s
V_SedUpBod = 0.001 m/s  # design constraints
V_SedCBod = 0.00012 m/s
V_SedUp = 0.000998898 m/s  # Actual values from this design
V_SedC =  # error
W_SedSideSlopes = 0.52505 m
AN_SedSlope = 0.872665
Ti_Sed =  # error
# Sedimentation Tank Sludge Drain:
N_SedSludgeOrifices = 48  # per cell
Ti_SludgeDrain = 1800 s  # Tank Drain time
W_SedSludge = 0.0914686 m  # Width of the sludge channel
H_SedSludge = 0.0914686 m  # Depth of the sludge channel
# Distance center to center between drain orifices
B_SedSludgeOrifices = 0.104019 m
W_SedDrainCover = 0.131469 m
D_SedSludgeOrifice = 0.00924418 m  # Diameter of drain orifices
N_SedSludgeOrifices = 48
ND_SedSludgePipe = 0.1016 m
# Sedimentation Tank Dimensions:
Z_SedSludge = 0.0914686 m  # Height from 0 of the top of the sludge drain
Z_SedSideSlopes = 0.783899 m
W_Sed = 2.1336 m  # Total tank wall height
L_Sed = 6.22193 m  # Total tank length
H_Sed = 1.98799 m
# Sedimentation Tank Inlet Channel:
EN_InletChannelGeom = 1
HW_SedInletChannel = 0.38815 m
W_SedInletChannel = 0.578538 m
L_SedChannel = 6.7008 m
H_SedInletChannel = 0.48815 m
HL_SedWeirInlet = 0.0187499 m
W_SedInletChannelPreWeir = 0.388538 m
H_SedWeirInlet = 0.3694 m
W_SedWeirInlet = 6.7008 m
# Sedimentation Tank Effluent Launder:
N_SedLaunderOrifices = 49  # Number of orifices per launder
N_SedLaunderOrificesRow =  # error  # Number of orifices per row
Z_SedLaunder = 1.74485 m
Q_SedLaunderOrifices = 0.000108844 m^3/s
B_SedLaunderOrifices = 0.1 m  # Center to center launder spacing
# More Launder Dimensions
ND_SedLaunder = 0.1524 m
D_SedLaunderOrifice = 0.015875 m
L_SedLaunder = 5.0882 m
HL_SedLaunderOrifice = 0.0388453 m
# Sedimentation Tank Inlet Manifold:
ND_SedManifold = 0.2032 m
L_SedManifoldDiffuser = 0.156036 m
Z_SedManifoldPipe = 0.414802 m
ND_SedDiffuser = 0.0254 m
D_SedManifoldPort = 0.03175 m
B_SedManifoldPort = 0.0498125 m
N_SedManifoldPorts = 99
L_SedManifoldPipe = 5.16443 m
ED_SedInlet = 0.01 m^2/s^3
Q_SedManifoldPort = 5.38721e-5 m^3/s
# Exit Channel:
W_SedExitChannel = 0.3485 m
H_SedExitChannel = 0.48815 m
HW_SedExitChannel = 0.34815 m  # water height in exit channel from base of channel
H_SedWeirExit = 0.329146 m
# Lamella:
L_SedPlate = 0.6 m
B_SedPlate = 0.027 m  # center to center distance between lamella
S_SedPlate = 0.025 m  # spacing between lamella
N_SedPlates = 160  # Number of Sed Plates per Sedimentation Tank Bay.
N_SedModules = 20  # Number of modules per bay
N_SedModulePlates = 8  # Number of plates per module
AN_SedPlate = 1.0472
L_SedActive = 4.986 m
Z_SedLaunder = 1.74485 m
HW_Sed = 1.86783 m
H_Sed = 1.98799 m
# SRSF
H_Fi = 4.31047 m
L_Fi = 1.08239 m
W_Fi = 1.5629 m
B_FiManifoldBranch = 0.1 m
ND_FiTrunk = 0.1524 m
ND_FiManBranch = 0.0254 m
ND_FiBwTrunk = 0.2032 m
ND_FiBwManBranch = 0.0381 m
ND_FiExitWaste = 0.1016 m
ND_FiBwWeirDrain =  # error
ND_FiBwDrain =  # error  # For the box that holds keeps the end of the siphon submerged
ND_FiSandOutlet = 0.0508 m
Ti_FiSand = 813.03 s  # This is the time required to empty the filter of the sand.
ND_FiSiphonAirValve = 0.01905 m
ND_FiSiphon = 0.2032 m
Q_FiSiphonMax = 0.0774414 m^3/s
B_FiSiphonManOrifices = 0.105732 m
N_FiSiphonManOrifices = 8
D_FiSiphonManOrifices = 0.0711326 m
Ti_FiBwInitiation = 72.1708 s
H_FiSand = 1.23 m
N_FiLayer = 6
H_FiLayer = 0.2 m
V_FiLayer = 0.00183333 m/s
HL_FiTerminal = 0.4 m
V_FiBw = 0.011 m/s
HL_FiBwInitiation = 1.4177 m
HL_FiBwSS = 1.2177 m
D_FiSand =  # error
N_Fi = 2
Q_Fi = 0.016 m^3/s
W_Slots =  # error
B_FiBwManSlot = 0.0047625 m
L_FiBwManSlot =  # error
B_FiManSlot = 0.003175 m
L_FiManSlot =  # error
N_FiSlotRows = 2
Z_FiBottom = -2.5683 m
Z_FiTop = 1.74217 m
# Weirs
HL_FiWeir =  # error
L_FiWeir =  # error
Z_FiEntranceWeir = 1.60314 m
Z_FiBwWeir =  # error
Z_FiSiphonInlet = -0.740724 m  # This is the centerline elevation of the siphon orifices
Z_FiExitWeir =  # error
Z_FiExitBottom = 0.728762 m  # bottom of the filtered water box
Z_FiEntranceBottom = 0.728762 m  # bottom of the entrance box
Z_FiSiphonCoupling = 0.95793 m
Z_FiBwTop =  # error
W_FiBwDrain =  # error
H_FiBwDrain =  # error
N_Launders =  # error
L_LaunderPipeTotal =  # error
N_LaunderCouplings =  # error
N_ValveCouplings = 6
N_SedPlatesTotal = 960
N_SedPlatesPerSheet = 5
N_SedPlateSheets = 192
N_Valves = 6
A_EtFloor =  # error
W_FlocWithWalls = 2.76 m
L_FlocWithWalls = 6.52193 m
Vol_FlocFloor = 2846.82 L
A_FlocFloor = 18.9788 m^2
Vol_SedSlopes =  # error
A_SedWalls =  # error
A_SedFloor = 45.6587 m^2
# Materials List
# Plant Summary Calculations:
HL_PlantTotal := Z_EtTop - H_PlantFreeboard - Z_FiExitWeir
HL_PlantTotal =  # error
## Make AC variables that are shorter than 598 lines
AC_CdcA :=
    AC_Cdc if last(AC_Cdc) < 598
    submatrix(AC_Cdc, 0, 598, 0, 0) otherwise
AC_CdcB :=
    submatrix(AC_Cdc, 599, last(AC_Cdc), 0, 0) if last(AC_Cdc) < 1197
    submatrix(AC_Cdc, 599, 1197, 0, 0) otherwise
AC_CdcC :=
    submatrix(AC_Cdc, 1198, last(AC_Cdc), 0, 0) if last(AC_Cdc) < 1796
    submatrix(AC_Cdc, 1198, 1796, 0, 0) otherwise
AC_SedTankA :=
    AC_SedTank if last(AC_SedTank) < 598
    submatrix(AC_SedTank, 0, 598, 0, 0) otherwise
AC_FilterA :=
    AC_Filter if last(AC_Filter) < 598
    submatrix(AC_Filter, 0, 598, 0, 0) otherwise
AC_SedTankB :=
    submatrix(AC_SedTank, 599, last(AC_SedTank), 0, 0) if last(AC_SedTank) < 1197
    submatrix(AC_SedTank, 599, 1197, 0, 0) otherwise
AC_FilterB :=
    submatrix(AC_Filter, 599, last(AC_Filter), 0, 0) if last(AC_Filter) < 1197
    submatrix(AC_Filter, 599, 1197, 0, 0) otherwise
AC_SedTankC :=
    submatrix(AC_SedTank, 1198, last(AC_SedTank), 0, 0) if last(AC_SedTank) < 1796
    submatrix(AC_SedTank, 1198, 1796, 0, 0) otherwise
AC_FilterC :=
    submatrix(AC_Filter, 1198, last(AC_Filter), 0, 0) if last(AC_Filter) < 1796
    submatrix(AC_Filter, 1198, 1796, 0, 0) otherwise
AC_ChemTanksA :=
    AC_ChemTanks if last(AC_ChemTanks) < 598
    submatrix(AC_ChemTanks, 0, 598, 0, 0) otherwise
AC_FilterD :=
    submatrix(AC_Filter, 1797, last(AC_Filter), 0, 0) if last(AC_Filter) < 2395
    submatrix(AC_Filter, 1797, 2395, 0, 0) otherwise
AC_FlocTankA :=
    AC_FlocTank if last(AC_FlocTank) < 598
    submatrix(AC_FlocTank, 0, 598, 0, 0) otherwise
AC_ChemTanksB :=
    submatrix(AC_ChemTanks, 599, last(AC_ChemTanks), 0, 0) if last(AC_ChemTanks) < 1197
    submatrix(AC_ChemTanks, 599, 1197, 0, 0) otherwise
AC_FlocTankB :=
    submatrix(AC_FlocTank, 599, last(AC_FlocTank), 0, 0) if last(AC_FlocTank) < 1197
    submatrix(AC_FlocTank, 599, 1197, 0, 0) otherwise
AC_ChemTanksC :=
    submatrix(AC_ChemTanks, 1198, last(AC_ChemTanks), 0, 0) if last(AC_ChemTanks) < 1796
    submatrix(AC_ChemTanks, 1198, 1796, 0, 0) otherwise
AC_FlocTankC :=
    submatrix(AC_FlocTank, 1198, last(AC_FlocTank), 0, 0) if last(AC_FlocTank) < 1796
    submatrix(AC_FlocTank, 1198, 1796, 0, 0) otherwise  # error: This array has an incorrect number of rows and columns.
AC_FlocTankD :=
    submatrix(AC_FlocTank, 1797, last(AC_Filter), 0, 0) if last(AC_FlocTank) < 2395
    submatrix(AC_FlocTank, 1797, 2395, 0, 0) otherwise
AC_DrainChannelA :=
    AC_DrainChannel if last(AC_DrainChannel) < 598
    submatrix(AC_DrainChannel, 0, 598, 0, 0) otherwise
AC_EntranceTankA :=
    AC_EntranceTank if last(AC_EntranceTank) < 598
    submatrix(AC_EntranceTank, 0, 598, 0, 0) otherwise
AC_DrainChannelB :=
    submatrix(AC_DrainChannel, 1198, last(AC_DrainChannel), 0, 0) if last(AC_DrainChannel) < 1197
    submatrix(AC_DrainChannel, 1198, 1796, 0, 0) otherwise
AC_EntranceTankB :=
    submatrix(AC_EntranceTank, 599, last(AC_EntranceTank), 0, 0) if last(AC_EntranceTank) < 1197
    submatrix(AC_EntranceTank, 599, 1197, 0, 0) otherwise
AC_DrainChannelC :=
    submatrix(AC_DrainChannel, 1198, last(AC_DrainChannel), 0, 0) if last(AC_DrainChannel) < 1796
    submatrix(AC_DrainChannel, 1198, 1796, 0, 0) otherwise
AC_EntranceTankC :=
    submatrix(AC_EntranceTank, 1198, last(AC_EntranceTank), 0, 0) if last(AC_EntranceTank) < 1796
    submatrix(AC_EntranceTank, 1198, 1796, 0, 0) otherwise
AC_OperatorAccessA :=
    AC_OperatorAccess if last(AC_OperatorAccess) < 598
    submatrix(AC_OperatorAccess, 0, 598, 0, 0) otherwise
AC_OperatorAccessB :=
    submatrix(AC_OperatorAccess, 599, last(AC_OperatorAccess), 0, 0) if last(AC_OperatorAccess) < 1197
    submatrix(AC_OperatorAccess, 599, 1197, 0, 0) otherwise
AC_OperatorAccessC :=
    submatrix(AC_OperatorAccess, 1198, last(AC_OperatorAccess), 0, 0) if last(AC_OperatorAccess) < 1796
    submatrix(AC_OperatorAccess, 1198, 1796, 0, 0) otherwise
AC_ZZMatApplyA :=
    AC_MatApply if last(AC_MatApply) < 598
    submatrix(AC_MatApply, 0, 598, 0, 0) otherwise
AC_ZZLayoutA :=
    AC_Layout if last(AC_Layout) < 598
    submatrix(AC_Layout, 0, 598, 0, 0) otherwise
AC_ZZMatApplyB :=
    submatrix(AC_MatApply, 1198, last(AC_MatApply), 0, 0) if last(AC_MatApply) < 1197
    submatrix(AC_MatApply, 1198, 1796, 0, 0) otherwise  # error: This array has an incorrect number of rows and columns.
AC_ZZLayoutB :=
    submatrix(AC_Layout, 1198, last(AC_Layout), 0, 0) if last(AC_Layout) < 1197
    submatrix(AC_Layout, 1198, 1796, 0, 0) otherwise  # error: This array has an incorrect number of rows and columns.
AC_ZZLayoutC :=
    submatrix(AC_Layout, 1198, last(AC_Layout), 0, 0) if last(AC_Layout) < 1796
    submatrix(AC_Layout, 1198, 1796, 0, 0) otherwise  # error: This array has an incorrect number of rows and columns.
AC_ZZMatApplyC :=
    submatrix(AC_MatApply, 1198, last(AC_MatApply), 0, 0) if last(AC_MatApply) < 1796
    submatrix(AC_MatApply, 1198, 1796, 0, 0) otherwise  # error: This array has an incorrect number of rows and columns.
## Display AC variables
AC_EntranceTankA =  # error
AC_EntranceTankB =  # error
AC_EntranceTankC =  # error
AC_FlocTankA = [
    "-layer m FlocTankCon"; "c t 132,132,132"; "FlocTankCon"; "  "; "_-view o t _zoom w 0.16,6.6908,0 -6.38193,9.6208,2.2676"; "_box 0,6.8508,0 -6.22193,9.4608,2.2676 _box 0.15,6.7008,-0.15 -6.37193,9.6108,2.2676"; "_subtract 0.15,6.7008,-0.15  0,6.8508,0 "; "_box -6.37193,7.3908,0 0.15,7.5408,2.2676"; "-array l  R 3 1 0.69"; "-group c FlocTankCon y "
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]
AC_FlocTankB = [
    "_union 0.33763,7.1208,0 0.43764,7.1208,0 "; "-group c FlocDrainAdapterPlu y "; "all "; "-layer s 0"; "  "; "-layer f FlocDrainAdapterPlu"; "  "; "-layer m FlocDrainValvePlu"; "c t 0,127,255"; "FlocDrainValvePlu"
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]
AC_FlocTankD =  # error
AC_FlocTankC =  # error
AC_OperatorAccessA =  # error
AC_OperatorAccessC =  # error
AC_OperatorAccessB =  # error
AC_SedTankA = [
    "-layer m SedTankCon"; "c t 132,132,132"; "SedTankCon"; "  "; "_-view o r"; "_pline"; "2.1836,0"; "1.64593,0"; "1.64593,0.09147"; "1.66593,0.09147"
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]
AC_SedTankB = [
    "_union -6.82858,1.6002,0.03432 -6.72459,1.6002,0.03432 "; "rotate3d l  z -6.78159,1.6002,0.03432 180"; "-group c SedSludgeAdapterPlu y "; "all "; "-layer s 0"; "  "; "-layer f SedSludgeAdapterPlu"; "  "; "-layer m SedSludgeValvePlu"; "c t 0,127,255"
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]
AC_SedTankC = [
    "-layer m SedEChannelHorizCouplingPlu";
    "c t 0,255,0";
    "SedEChannelHorizCouplingPlu";
    "  ";
    "_zoom w -6.43893,0.04,0.24115 -6.10143,0.24415,0.057";
    "_cylinder -6.27018,0.14208,0.14907 0.09207 a -6.21318,0.14208,0.14907";
    "_cylinder -6.37193,0.14208,0.14907 0.09207 a -6.31493,0.14208,0.14907";
    "_cylinder -6.31493,0.14208,0.14907 0.08414 a -6.27018,0.14208,0.14907";
    "_union -6.21318,0.05,0.14907 -6.37193,0.05,0.14907 -6.27018,0.05794,0.14907 ";
    "-group c DeleteMe y "
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]
AC_ChemTanksA =  # error
AC_ChemTanksB =  # error
AC_ChemTanksC =  # error
AC_DrainChannelA =  # error
AC_DrainChannelB =  # error
AC_DrainChannelC =  # error
AC_ZPlantLayout = ["-layer t Floc*"; "  "; "mirror3d all  yz -3.11096,0 y  "; "-layer s 0"; "  "; "-layer f Floc*"; "  "]
AC_FilterA =  # error
AC_FilterD =  # error
AC_FilterB =  # error
AC_FilterC =  # error
HW_Sed = 1.86783 m
# this variable is displayed to ensure that LabView can read AC.ZZEnd (error in LabView "read mathcad file" code that it misses the last variable)
AC_CdcA =  # error
AC_CdcC =  # error
AC_CdcB =  # error
# AC_ZZMatApplyA | AC_ZZMatApplyB
AC_ZZMatApplyC
AC_ZZLayoutA = [
    "laythw"; "-layout t AguaClara 0"; "View"; "layout d Layout1"; " d Layout2"; "layout r View"; "TopView"; "layout s TopView"; ".ms"; "z o all "
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]
AC_ZZLayoutC =  # error
AC_ZZLayoutB =  # error
Q_Plant = 0.032 m^3/s
