# [reference: MasterProgram.xmcd]
FilterInletTank_origin := [
    echanneltank_origin[0] - T_PlantWall - W_ExitChannel;
    echanneltank_origin[1];
    echanneltank_origin[2]
] = [-0.523167; -0.57432; 1.38359] m
FilterInletBox_origin := [echannelbox_origin[0] - T_PlantWall; echannelbox_origin[1] - W_ExitChannel; echannelbox_origin[2]] = [-0.523167; -0.523167; 1.38359] m
filterinletbox_dim := [T_PlantWall; W_ExitChannel; H_ExitChannel] = [0.15; 0.373167; 0.355898] m
sedechanneltankscript :=
    viewtope ← viewtop1
    layernewect ← layer_new("echanneltank", ltgrey)
    tankect ← Tank(echanneltank_origin, echanneltank_dim, T_PlantWall)
    boxect ← box(echannelbox_origin, echannelbox_origin + echannelbox_dim)
    subtractect ← subtractD(echanneltank_origin, echannelbox_origin)
    layerset ← layer_set("0")
    layerfreezeect ← layer_freeze("echanneltank")
    one ← stack(viewtope, layernewect, tankect, boxect, subtractect, layerset, layerfreezeect)
    return one
# ***Drawn for reference***
FilterInletBoxscript :=
    viewtope ← viewtop1
    layernewfib ← layer_new("SRSF inlet box", ltgrey)
    tankfib ← Tank(FilterInletTank_origin, echanneltank_dim, T_PlantWall)
    boxfib ← box(FilterInletBox_origin, FilterInletBox_origin + filterinletbox_dim)
    subtractfib ← subtractD(FilterInletTank_origin, filterinletbox_dim)
    layerset ← layer_set("0")
    layerfreezefib ← layer_freeze("SRSF inlet box")
    one ← stack(viewtope, layernewfib, tankfib, boxfib, subtractfib, layerset, layerfreezefib)
    return one
# ***Subtract for weir is not complete***
filterscript :=
    viewtope ← viewtop1
    layernewfilt ← layer_new("SRSF", ltgrey)
    tankfilt ← Tank(FilterTank_origin, echanneltank_dim, T_PlantWall)
    layerset ← layer_set("0")
    layerfreezefilt ← layer_freeze("SRSF")
    one ← stack(viewtope, layernewfilt, tankfilt, layerset, layerfreezefilt)
    return one  # error: This variable is undefined.
AC_Filter := stack(FilterInletBoxscript, sedechanneltankscript)
# [component: inputs AC_Filter]
