# AguaClara Water Treatment Plants
# Automated Design
# Add variable descriptions next to every varible so it is easy to interpret what this all means.
# Design References
# [reference: BasicInputs.xmcd]
# Use BasicClientInputs and ExpertClientInputs when this is run by LabVIEW.
# Use BasicInputs and ExpertInputs to use the program in MathCAD
# Change the reference by
# - right clicking
# - select properties
# - reference tab
# - type in the correct file name
# [reference: ExpertInputs.xmcd]
B_SedPlateFramePipes = 0.3 m
# [reference: DesignAssumptions.xmcd]
# [reference: MathFunctions.xmcd]
# [reference: PipeDatabase.xmcd]
Q_Plant = 10 L/s
# [reference: MinorLossCoefficients.xmcd]
# [reference: FluidsFunctions.xmcd]
# [reference: ChemStorageTanks.xmcd]
# [reference: Sedimentation Tank.xmcd]
# [reference: Floc Hopper - New Design.xmcd]
# [reference: FCM.xmcd]
# [reference: Flocculator 3.xmcd]
# [reference: RapidMixer.xmcd]
# [reference: EntranceTankDim.xmcd]
# [reference: Materials List.xmcd]
W_SedBay = 1 m
N_SedTanks = 2
W_ExitChannelMin = 0.254 m
W_SedBay = 1 m
N_SedBays = 2
# Sed Tanks and Slopes:
Geom_ExitChannel = 1
B_SedPort =  # error: This variable is undefined.  # Height of the narrowest part of the manifold ports
N_SedTanks = 2
W_SedPort =  # error
H_SedBetween = 0 cm  # Distance from the top of the inlet manifold to the bottom of the ledge supporting the lamella frame
A_SedPort =  # error  # Port Area
L_Sed = 3.2797 m
W_SedSludgeFlat =  # error  # Distance between tips of manifold plates (space alloted for the drain holes
N_SedBays = 2  # Number of bays of inlet manifolds in each sed tank
AN_SedTopInlet =  # error  # Angle of the top of the inlet manifold
L_SedPort =  # error  # Length of the port through which water exits the inlet manifold
AN_SedBottom =  # error  # Angle of the bottom of inlet manifold
W_SedSlopePlate =  # error  # Width of ferrous cement plates in whice one manifold port is cut
Q_SedBay = 2.5 L/s
W_SedBayActual =  # error
L_SedSlopeManifold =  # error  # This is the extra distance between the last slope and the wall
# Sedimentation Tank Sludge Drain:
N_SedSludgeOrifices = 30  # per cell
Ti_SludgeDrain = 30 min  # Tank Drain time
W_SedSludge = 11.2699 cm  # Width of the sludge channel
B_SedSludgeOrifices = 10.8164 cm  # Distance center to center between drain orifices
H_SedSludge = 5.63494 cm  # Depth of the sludge channel
T_SedSludge = 5 cm
T_SedSludge = 5 cm
# Thickness of the plate topping the sludge channel
# through which drain holes are formed
W_SedDrainCover = 21.2699 cm
D_SedSludgeOrifice = 0.014 m  # Diameter of drain orifices
W_SedInletBottom = 0.393651 m
N_SedSludgeOrifices = 30
ND_SedSludgeValve = 1.5 in
# Sedimentation Tank Dimensions:
Z_SedSludge = 0.106349 m  # Height from 0 of the top of the sludge drain
H_SedBottomSlope =  # error  # Height of the bottom slope
H_SedTopSlope =  # error  # Height of the top of the inlet manifold
Z_SedSlopes = 0.744871 m  # Height from 0 of the top of the inlet manifold
W_Sed = 2 m  # Total tank wall height
L_Sed = 3.2797 m  # Total tank length
# Inlet Channel:
HW_InletChannel = 0.128756 m  # Width of the drop chimneys connecting channel to sed inlet manifolds
W_InletChannel = 0.393172 m  # length of drop chimmneys
L_Channel = 4.45 m
W_SedManifoldEntrance =  # error
L_SedManifoldEntrance =  # error
H_SedManifoldPort =  # error  # Ports at bottom of inlet chimney are set to be triangles
W_SedManifoldPort =  # error
N_SedInletPipes = 2  # per sed bay
H_InletChannel = 0.325219 m
# Sedimentation Tank Effluent Launder:
N_SedLaunderOrifices = 30  # Number of orifices per launder
Q_SedLaunderOrifices = 8.37896e-5 m^3/s  # More Launder Dimensions
ND_SedLaunder = 4 in
B_SedLaunderOrifices = 0.127171 m  # Center to center launder spacing
L_SedLaunder = 1.98971 m
# Exit Channel:
D_SedLaunderOrifice = 0.551181 in
W_ExitChannel = 0.517452 m
H_ExitChannel = 0.325219 m
L_ExitChannel = 4.45 m
H_PltWeir = 0.138756 m  # height of the weir carrying water to the distribution tank
HW_ExitChannel = 0.0887562 m  # water height in exit channel from 0
# Lamella:
L_SedPlate = 0.73152 m
B_SedPlate =  # error  # center to center distance between lamella
S_SedPlate = 2.5 cm  # spacing between lamella
N_SedPlates = 60  # Number of Sed Plates per Sedimentation Tank Bay.
AN_SedPlate = 60 deg
ZW_ExitChannel =  # error
V_SedC = 9.29605 m/day
L_SedActive = 1.90757 m
T
V_SedUp = 65.8596 m/day
Z_SedLaunder = 1.62206 m
H_SedPlate = 0.633515 m
H_SedAbove = 0.152359 m  # Height of water needed above the lamella
N_SedPlates = 60
HW_Sed = 1.71726 m
H_Sed = 1.81726 m
Z_Mp = 1.58851 m
N_SedPorts =  # error
H_SedBayDivider = 0.744871 m
W_SedSlopePlateRemaining =  # error
W_SedBayDivider =  # error
# Sedimentation Tank Floc Hopper:
A_FlocHopper =  # error
L_FlocHopper =  # error  # Length of the hopper cement plate
L_FlocHopperOffset = 0.36576 m  # distance from the edge of the channel to the bottom of the first lamella (collection distance)
W_FlocHopper =  # error  # width of the hopper set within each bay
# Flow Controller:
N_Fcm = 2
ID_FcmTube = 3.175 mm
ID_FcmTube = 0.125 in
L_FcmTube = 125.479 cm
Q_FcmTubeMax = 225 mL/min
HL_FcmValve = 9.40555 cm
# Flocculator: | Look at Flocculator Positioning arrays
W_FlocChannel = 0.5 m
# Fill last channel with bafffles from last channel
# Fix port width to be based on energy dissipation in that channel
ED_Floc = 6 mW/kg
# Adjust spacing after the number of baffles per channel is known.
# Check the residence time of the flocculator should be at least 20minutes
HW_FlocEnd = 1.71726 m
X_FlocBaffles = [
    0.155277, 0.155277, 0.155277, 0.155277, 0.19716;
    0.350553, 0.350553, 0.350553, 0.350553, 0.403393;
    0.54583, 0.54583, 0.54583, 0.54583, 0.609627;
    0.741107, 0.741107, 0.741107, 0.741107, 0.81586;
    0.936384, 0.936384, 0.936384, 0.936384, 1.02209;
    1.13166, 1.13166, 1.13166, 1.13166, 1.22833;
    1.32694, 1.32694, 1.32694, 1.32694, 1.43456;
    1.52221, 1.52221, 1.52221, 1.52221, 1.64079;
    1.71749, 1.71749, 1.71749, 1.71749, 1.84703;
    1.91277, 1.91277, 1.91277, 1.91277, 2.05326;
    2.10804, 2.10804, 2.10804, 2.10804, 2.25949;
    2.30332, 2.30332, 2.30332, 2.30332, 2.46573;
    2.4986, 2.4986, 2.4986, 2.4986, 2.67196;
    2.69387, 2.69387, 2.69387, 2.69387, 2.87819;
    2.88915, 2.88915, 2.88915, 2.88915, 3.08443;
    3.08443, 3.08443, 3.08443, 3.08443, 0
] m
L_FlocBaffles = [
    1.56199, 1.56199, 1.56199, 1.56199, 1.73809;
    1.75029, 1.75029, 1.75029, 1.75029, 1.54978;
    1.56199, 1.56199, 1.56199, 1.56199, 1.73809;
    1.75029, 1.75029, 1.75029, 1.75029, 1.54978;
    1.56199, 1.56199, 1.56199, 1.56199, 1.73809;
    1.75029, 1.75029, 1.75029, 1.75029, 1.54978;
    1.56199, 1.56199, 1.56199, 1.56199, 1.73809;
    1.75029, 1.75029, 1.75029, 1.75029, 1.54978;
    1.56199, 1.56199, 1.56199, 1.56199, 1.73809;
    1.75029, 1.75029, 1.75029, 1.75029, 1.54978;
    1.56199, 1.56199, 1.56199, 1.56199, 1.73809;
    1.75029, 1.75029, 1.75029, 1.75029, 1.54978;
    1.56199, 1.56199, 1.56199, 1.56199, 1.73809;
    1.75029, 1.75029, 1.75029, 1.75029, 1.54978;
    1.56199, 1.56199, 1.56199, 1.56199, 1.73809;
    1.75029, 1.75029, 1.75029, 1.75029, 0
] m
Z_FlocBaffles = [
    0, 0, 0, 0, 0.166233;
    0.155277, 0.155277, 0.155277, 0.155277, 0;
    0, 0, 0, 0, 0.166233;
    0.155277, 0.155277, 0.155277, 0.155277, 0;
    0, 0, 0, 0, 0.166233;
    0.155277, 0.155277, 0.155277, 0.155277, 0;
    0, 0, 0, 0, 0.166233;
    0.155277, 0.155277, 0.155277, 0.155277, 0;
    0, 0, 0, 0, 0.166233;
    0.155277, 0.155277, 0.155277, 0.155277, 0;
    0, 0, 0, 0, 0.166233;
    0.155277, 0.155277, 0.155277, 0.155277, 0;
    0, 0, 0, 0, 0.166233;
    0.155277, 0.155277, 0.155277, 0.155277, 0;
    0, 0, 0, 0, 0.166233;
    0.155277, 0.155277, 0.155277, 0.155277, 0
] m
N_FlocChannels = 5
L_FlocTank = 16.3985 m
HL_Floc = 13.8303 cm
HW_FlocStart = 1.85557 m
S_FlocBaffle = [15.5277; 15.5277; 15.5277; 15.5277; 16.6233] cm
B_FlocBaffle = [19.5277; 19.5277; 19.5277; 19.5277; 20.6233] cm
N_FlocChannelBaffles = [16; 16; 16; 16; 15]
W_FlocPort = [0.155277; 0.155277; 0.155277; 0.155277; 0.167481] m
HL_FlocChannels = [2.87591; 2.87591; 2.87591; 2.87591; 2.32662] cm
L_FlocBaffleLower = [1.56199; 1.56199; 1.56199; 1.56199; 1.54978] m
L_FlocBaffleUpper = [1.75029; 1.75029; 1.75029; 1.75029; 1.73809] m
H_FlocPort = [0.5; 0.5; 0.5; 0.5; 0.5] m
Ti_Floc = 23.4672 min  # residence time of the flocculator
N_FlocBaffles = 79
# Rapid Mix Unit and Entrance Tank:
L_Et = 1.11098 m
W_Et = 1.11098 m
H_Et = 2.25557 m  # Height of Entrance Tank Orifice
W_EtOrifice[30] = 0.031 m
L_trueET[30] = 0.258528 m  # Length of Entrance Tank Orifice
Pi_EtFlow[30] = 0.278388  # Ratio of the minimum flow divided by the maximum flow through the plant.
L_FlocEntryOrifice = 50 cm  # Length of orifice entering into flocculator from Rapid Mix Unit
W_FlocEntryOrifice = 18.7002 cm  # Height of orifice entering into flocculator
ED_Diffusion =  # error  # Minimum Energy Dissipation needed
HL_FlocEntryOrifice = 0.087035 cm  # Head loss caused by entering flocculation tank.
A_FlocEntry = 0.0935011 m^2
A_EtOrifice = 80.1436 cm^2
HW_EtTotal =  # error  # Total Height of water at beginning of rapid mix unit
HW_Channel2 =  # error  # Height of water at the back of the entrance tank channel (from channel bottom)
HW_EtChannel = 4.87905 cm  # Height of Waterfall into flocculator
W_EtChannel = 15.5277 cm  # Widt of entrance tank channel
Vol_Stock = 810 L  # Volume of chemical stock tanks
ZW_ExitChannel =  # error  # Water Level at the end of the plant in the exit channel and exit channel box
HW_Sed = 1.71726 m
HW_FlocStart = 1.85557 m  # Water level at the beginning of the floc tank
HL_Floc = 13.8303 cm  # just for ref. the head loss throught the floc tank
HW_EtTotal =  # error  # Height of the water in the entrance channel
# Materials List:
L_LaunderPipe =  # error
N_Launders = 4
L_LaunderPipeTotal = 7.95882 m
N_Valves = 4
N_LaunderCouplings = 4
N_ValveCouplings = 4
N_SedPlatesTotal = 240
N_SedPlatesPerSheet = 5
N_SedPlateSheets = 48
N_PipeSedPlateStand =  # error
A_SedTank =  # error
# [reference: AutoCADMasterProgram.xmcd]
# AutoCAD References
AC_SedTank =  # no stored result
AC_EntranceTank = [
    "-layer m entrancetank";
    "c t 214,214,214";
    "entrancetank";
    "  ";
    "_-view o t _zoom w 2.27098,7.39,0 0.84,8.82098,2.25557 _box 2.11098,7.55,0 1,8.66098,2.25557 _box 2.26098,7.4,-0.15 0.85,8.81098,2.25557 _subtract 2.26098,7.4,-0.15  2.11098,7.55,0 ";
    "-layer s 0";
    "  ";
    "-layer f entrancetank";
    "  ";
    "-layer s entrancetank";
    "  ";
    "_box 1.95571,7.4,2.20557 2.11098,7.55,2.25557";
    "-layer s 0";
    "  ";
    "-layer t entrancetank";
    "  ";
    "_-view o t";
    "_subtract 2.26098,7.55,0  1.95571,7.4,2.20557 ";
    "-layer f entrancetank";
    "  "
]
AC_FlocTank = [
    "-layer m floctank";
    "c t 91,91,91";
    "floctank";
    "  ";
    "_-view o t _zoom w 0.16,4.14,0 -3.4397,7.56,1.95557 _box 0,4.3,0 -3.2797,7.4,1.95557 _box 0.15,4.15,-0.15 -3.4297,7.55,1.95557 _subtract 0.15,4.15,-0.15  0,4.3,0 ";
    "_box -3.4297,4.8,0 0.15,4.95,1.95557";
    "_box -0.15528,4.8,0.5 0,4.95,0";
    "_subtract -3.4297,4.8,0  -0.15528,4.8,0.5 ";
    "_box -3.4297,5.45,0 0.15,5.6,1.95557";
    "_box -3.2797,5.45,0.5 -3.12443,5.6,0"
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]
