# Automated Materials List
# This is actually the length of the  launders
L_LaunderPipe := L_SedLaunder
# Length of a pipe.
N_Launders := N_SedTanks*N_SedBays*N_SedLaunders
# Total length of the pipes.
L_LaunderPipeTotal := L_LaunderPipe*N_Launders
# There are 2 sed inlet pipes per sed bay.
N_Valves := N_SedBays*N_SedTanks
N_LaunderCouplings := N_Launders
N_ValveCouplings := N_Valves
N_SedPlatesTotal := N_SedPlates*N_SedBays*N_SedTanks
N_SedPlatesPerSheet := floor(L_SedPlateSheet/L_SedPlate)
N_SedPlateSheets := ceil(N_SedPlatesTotal/N_SedPlatesPerSheet)
N_PipeSedPlateFrame := W_Sed/B_PipeSedPlateFrame - 1 + L_Sed/B_PipeSedPlateFrame - 1
L_PipeSedPlateFrameTotal := N_SedTanks*((W_Sed/B_PipeSedPlateFrame - 1)*L_Sed + (L_Sed/B_PipeSedPlateFrame - 1)*W_Sed)
N_PipeSedPlateStand := L_SedLaunder/B_PipeSedPlateStand
L_PipeSedPlateStand := N_PipeSedPlateStand
T_SedTank := T_ChannelWall
# This area is the area of the side of tank in plan view.
A_SedTank := (L_Sed + 2*T_PltWall)*(W_Sed*N_SedTanks + (N_SedTanks + 1)*T_PltWall)
A_FlocTank := (L_Sed + 2*T_PltWall)*(W_FlocChannel*N_FlocChannels + (N_FlocChannels - 1)*T_PltWall)
A_EntranceTank := (L_Et + T_PltWall)*(W_Et + 2*T_PltWall)
Vol_FlocBafflesTotal := H_Sed*T_FlocBaffles*(L_FlocBaffleLower*floor(N_FlocChannelBaffles/2) + L_FlocBaffleUpper*ceil(N_FlocChannelBaffles/2))*N_FlocChannels
# channel opening (?)
Vol_FlocTank := 2*(L_Sed + 2*T_PlantWall)*T_PlantWall*H_Floc + 2*(W_FlocChannel*N_FlocChannels + (N_FlocChannels - 1)*T_PlantWall)*T_PlantWall*H_Floc + A_FlocTank*T_PlantWall
Vol_InletChannel := 2*(W_InletChannel + 2*T_PlantWall)*T_PlantWall*H_InletChannel + 2*(L_InletChannel + T_PlantWall)*T_PlantWall*H_InletChannel
Vol_ExitChannel := 2*(W_ExitChannel + 2*T_PlantWall)*T_PlantWall*H_ExitChannel + 2*(L_ExitChannel + T_PlantWall)*T_PlantWall*H_ExitChannel
Vol_SedTank := A_SedTank*T_PlantWall + 2*((L_Sed + 2*T_PltWall)*T_PlantWall*H_Sed) + 2*(W_Sed*N_SedTanks + (N_SedTanks + 1)*T_PltWall)*T_PlantWall*H_Sed
Vol_EntranceTank := 2*(W_Et + 2*T_PlatWall)*T_PlantWall*H_Et + 2*(L_Et + T_PltWall)*T_PlantWall*H_Et + A_EntranceTank*T_PlantWall
# Trying to figure out the best way to count up all the different size pipes
Pipe_6inch :=
    L_SedLaunder if (ND_SedLaunderEst == 6 in)[□]  # error: This placeholder is empty.
